*Heading
** Job name: Job-1 Model name: Model-1
** Generated by: Abaqus/CAE 2018
*Preprint, echo=NO, model=NO, history=NO, contact=NO
**
** PARTS
**
*Part, name=Cube
*Node
      1,         -1.5,         -1.5,           3.
      2,         -1.5,        -0.75,           3.
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*Element, type=C3D8
 1,  26,  27,  32,  31,   1,   2,   7,   6
 2,  27,  28,  33,  32,   2,   3,   8,   7
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*Nset, nset=_PickedSet2, internal, generate
   1,  125,    1
*Elset, elset=_PickedSet2, internal, generate
  1,  64,   1
** Section: Solid
*Solid Section, elset=_PickedSet2, material=cu_grn
,
*End Part
**
**
** ASSEMBLY
**
*Assembly, name=Assembly
**
*Instance, name=Cube-1, part=Cube
*End Instance
**
*Nset, nset=Bottom, instance=Cube-1, generate
   1,  121,    5
*Elset, elset=Bottom, instance=Cube-1, generate
  1,  61,   4
*Nset, nset=Top, instance=Cube-1, generate
   5,  125,    5
*Elset, elset=Top, instance=Cube-1, generate
  4,  64,   4
*End Assembly
**
** MATERIALS
**
*Material, name=Steel
*Elastic
 2e+11, 0.28
*Material, name=cu_grn
*user material, constants=48, type=mechanical
298.00, 8.960e-09, 3.800e+08, 1.770e-05, 0.30, -36.30, 179500.00, -16.40
126400.00, -25.70, 82500.00, 0.05, 2.57e-07, 2.00e+06, 0.182, 0.25
0.122, 0.122, 0.070, 0.625, 0.137, 0.122, 1.000, 0.000
1.00e-12, 40800.00, 1.38e-23, 0.00, 5.00, 0.000, 79.82, 45.54
30.53, 12, 1615.38, 2.50e-02, 20.00, 12.0, 180.0, 2.00
** -, -, gam_0, m, s0, h0, s_s, a
0.0, 6.00e+03, 0.001, 0.012, 16.0, 250.0, 148.0, 2.5
*depvar
106
*user output variables
79
**
** BOUNDARY CONDITIONS
**
** Name: fixed Type: Displacement/Rotation
*Boundary
Bottom, 1, 1
Bottom, 2, 2
Bottom, 3, 3
Bottom, 4, 4
Bottom, 5, 5
Bottom, 6, 6
** ----------------------------------------------------------------
**
** STEP: Load
**
*Step, name=Load, nlgeom=YES
*Static
0.001, 5., 1e-05, 0.2
**
** BOUNDARY CONDITIONS
**
** Name: Load Type: Velocity/Angular velocity
*Boundary, type=VELOCITY
Top, 2, 2, -0.1
**
** OUTPUT REQUESTS
**
*Restart, write, frequency=0
**
** FIELD OUTPUT: F-Output-1
**
*Output, field, variable=PRESELECT
**
** HISTORY OUTPUT: H-Output-1
**
*Output, history, variable=PRESELECT
*End Step
